Nm := N*m
# CNC Fräse Auslegung:
# notwendige Daten:
b_Portal := 950 mm
# Eilganggeschwindigkeit:
v_e := 3.6*m/min = 0.06 m/s
T_max := 40 K + 274.15 K = 314.15 K
# Dauer der Beschleunigungsrampe:
t_r := 0.2 s
T_min := -10 K + 274.15 K = 264.15 K
# Gewicht des Portals:
m_portal := 65 kg
T_Raum := 20 K + 274.15 K = 294.15 K
# Schätzwert Schnittkraft:
F_Schnitt := 100 N
# Reibungszahl der Führungen:
ρ_Führung := 0.02
ΔT := [(T_max - T_Raum); (T_min - T_Raum)] = [20; -30] K
# Wirkungsgrad Spindel:
η_Spindel := 0.3
St37 := 11.1*10^-6*1/K
# Länge der Spindel:
l_Spindel := 1000 mm
# Durchmesser der Spindel:
d_Spindel := 20 mm
Alu5083 := 24.2*10^-6*1/K = 2.42e-5 1/K
# Spindelsteigung:
x_Spindel := 5 mm
# Getriebeübersetzung:
i_G := 1
Δα := Alu5083 - St37 = 1.31e-5 1/K
# Trägheitsmoment Motor:
J_M := 290 gm*cm^2
# Dichte Spindel:
φ_Spindel := 7.83*gm/cm^3
Δl_20 := b_Portal*Δα*ΔT[0] = 0.2489 mm
A_G := 108 m^2
# Sicherheitsfaktor:
s_sicherheit := 2
A_R := 2.7 m*4.6*m = 12.42 m^2
Δl_30 := b_Portal*Δα*ΔT[1] = -0.37335 mm
A_1 := 4.8 m*3.5*m = 16.8 m^2
# Berechnung Geschwindigkeiten:
Δl(T) := b_Portal*Δα*T
# Motor:
T := -40 K, -39 K .. 30 K
A_2 := 4 m*4*m = 16 m^2
Δl_Stahl(T) := b_Portal*St37*T
A_p := A_G - A_R - A_1 - A_2 = 62.78 m^2
# Drehzahl des Motors bei Eilgang:
n_e := v_e/x_Spindel = 720 1/min
Δl_Alu(T) := b_Portal*Alu5083*T
poise := A_R/A_p = 0.197834
# Winkelgeschwindigkeit der Motors bei Eilgang:
ω_e := 2*π*n_e = 75.3982 1/s
Preis := 1183.5
pulse_rev := 3200
spindel_steigung := 4
# Winkelbeschleunigung innerhalb der Rampe:
α_e := ω_e/t_r = 376.991 1/s^2
pulse_rev*1/spindel_steigung = 800
Total := poise*1183.5 = 234.136
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# Spindel:
# Drehzahl der Spindel bei Eilgang:
n_s := n_e*i_G = 720 1/min
# Winkelgeschwindigkeit der Spindel bei Eilgang:
ω_s := 2*π*n_s = 75.3982 1/s
# Winkelbeschleunigung innerhalb der Rampe:
α_s := ω_s/t_r = 376.991 1/s^2
# Drehmomentberechnung:
# Reibungskraft Tisch/Portal:
F_r := 9.81*m/s^2*m_portal*ρ_Führung = 12.753 N
F_r := 20 N
# Reibmoment an der Motorwelle:
T_RM := F_r*x_Spindel/(6.28*η_Spindel) = 0.0530786 Nm
# Schnittmoment an der Motorwelle:
T_Schnitt := F_Schnitt*x_Spindel/(6.28*η_Spindel) = 0.265393 Nm
# Masse Spindel:
m_Spindel := φ_Spindel*l_Spindel*π*d_Spindel^2/4 = 2.45987 kg
# Trägheitsmoment Spindel:
J_Spindel := 0.5*m_Spindel*(d_Spindel/2)^2 = 1.22993 kg*cm^2
# Trägheitsmoment Tisch/Portal:
J_Portal := m_portal*(x_Spindel/6.28)^2 = 4.12035e-5 kg*m^2
# Drehmoment statische Last:
T_statisch := (T_RM + T_Schnitt)/i_G = 0.318471 Nm  # A - 23
# A -20
L_A := 620 mm
L_A20 := 540 mm
# Drehmoment dynamsiche Last:
T_dynamisch := (J_Portal + J_Spindel)*α_s = 0.0619008 Nm
b_23 := 12 mm
b_20 := 12 mm
# Drehmoment zur Beschleunigung des Motors:
T_Beschl := J_M*α_e + T_dynamisch = 0.0728335 Nm
h_23 := 8 mm
h_20 := 8 mm
d_A := L_A/π = 197.352 mm
d_A20 := L_A20/π = 171.887 mm
# Erforderliches Drehmoment:
T_Gesamt := T_statisch + T_dynamisch + T_Beschl = 0.453206 Nm
d_i := d_A - (2*h_23) = 181.352 mm
d_i20 := d_A20 - (2*h_20) = 155.887 mm
# Drehmoment mit Sicherheit:
T_Sicherheit := T_Gesamt*s_sicherheit = 0.906411 Nm
L_I := d_i*π = 569.735 mm
L_I20 := d_i20*π = 489.735 mm
# Berechnung für das Kleben des Portalträgers
Gramm := kg*10^-3
V_Klebe := 15000 mm^3 = 15 cm^3
T_H := 120
ρ_Härter := 0.96*Gramm/cm^3
T_B := 100
ρ_Binder := 1.2*Gramm/cm^3
# Volumenteile Härter:
V_H := T_H*1/(ρ_Härter/(Gramm/cm^3)) = 125
# Volumenteile Binder:
V_B := T_B*1/(ρ_Binder/(Gramm/cm^3)) = 83.3333
# Mischungsverhältnis für Volumen:
V_Mischung := V_H/V_B*100 = 150
V_Härter := V_Klebe/(1 + 100/150) = 9 cm^3
V_Binder := V_Klebe - V_Härter = 6 cm^3
m_Härter := V_Härter*ρ_Härter = 8.64 Gramm
m_Binder := V_Binder*ρ_Binder = 7.2 Gramm
m_Härter/m_Binder = 1.2
